folder simulations: version=37; creator=Apsim 7.9-r4044
  memo
    Testing SoilWat and SWIM for OLW-DS
  simulation SoilWat
    summaryfile
    area SWT
      surfaceom SurfaceOrganicMatter
        PoolName = wheat  # Organic Matter pool name
        type = wheat  # Organic Matter type
        mass = 1000  # Initial surface residue (kg/ha)
        cnr = 80  # C:N ratio of initial residue
        standing_fraction = 0  # Fraction of residue standing
      fertiliser
      Soil Ruataniwha_13a1: SoilType=Duric Perch-gley Pallic Soils; Latitude=-41; Longitude=174; YearOfSampling=0
        DataSource=Profile descriptions provided by Smap based on the work done by Trevor Webb.
        LayerStructure: Thickness=[150, 150, 150, 75, 368.8, 368.8, 368.8, 368.8]
        Water
          Thickness  BD       AirDry  LL15    DUL     SAT       KS
          150        1.31175  0.0835  0.167   0.353   0.46965   1440
          150        1.50785  0.0935  0.187   0.352   0.40083   1920
          150        1.4734   0.122   0.122   0.266   0.41292   960
          75         2.385    0.1     0.1     0.1     0.101     0.24
          368.8      1.4734   0.0488  0.0488  0.1064  0.165168  48
          368.8      1.4734   0.0488  0.0488  0.1064  0.165168  48
          368.8      1.4734   0.0488  0.0488  0.1064  0.165168  48
          368.8      1.4734   0.0488  0.0488  0.1064  0.165168  48
          SoilCrop Ryegrass_Clover
            LL=[0.167, 0.187, 0.122, 0.1, 0.0488, 0.0488, 0.0488, 0.0488]
            KL=[0.15, 0.175, 0.0956442, 0.00162326, 0.00857431, 0, 0, 0]
            XF=[1, 1, 1, 0.0177388, 0.510686, 0.510686, 0.510686, 0.510686]
        SoilOrganicMatter: RootCN=40; RootWt=1000; SoilCN=11; EnrACoeff=7.4; EnrBCoeff=0.2
          Thickness  OC        FBiom      FInert
          150.0      2.6       0.0355051  0.321261
          150.0      1.51715   0.0203696  0.567217
          150.0      0.596717  0.014216   0.724045
          75.0       0.361293  0.0121466  0.803092
          368.8      0.227331  0.0105669  0.898806
          368.8      0.20143   0.010062   0.96653
          368.8      0.200075  0.0100068  0.98893
          368.8      0.200004  0.0100007  0.996339
        Analysis
          Thickness  Rocks  PH   CEC      ParticleSizeSand  ParticleSizeSilt  ParticleSizeClay
          150.0      0.0    7.0  16.014   8.0               72.0              20.0
          150.0      0.0    7.0  13.5776  8.0               72.0              20.0
          150.0      0.0    7.0  6.42261  60.0              28.0              12.0
          75.0       0.0    7.0  5.89291  60.0              28.0              12.0
          1475.0     60.0   7.0  5.53074  60.0              28.0              12.0
        Sample Initial nitrogen: NO3Units=kgha; NH4Units=kgha; SWUnits=Volumetric; OCUnits=Total; PHUnits=Water
          Thickness  NO3       NH4
          150.0      19.95     0.1
          150.0      19.95     0.1
          150.0      19.95     0.1
          75.0       6.70833   0.1
          368.8      0.860533  0.1
          368.8      0.860533  0.1
          368.8      0.860533  0.1
          368.8      0.860533  0.1
        InitialWater Initial water: FractionFull=1; PercentMethod=FilledFromTop
        SoilWater: SummerCona=4.4; SummerU=9; SummerDate=1-oct; WinterCona=4.4; WinterU=9; WinterDate=1-apr; DiffusConst=88; DiffusSlope=35; Salb=0.13; CN2Bare=73; CNRed=20; CNCov=0.8; MaxPond=30
          Thickness  SWCON  KLAT
          150        0.3    0
          150        0.3    0
          150        0.3    0
          75         0.05   0
          1475       0.2    0
      outputfile: filename=SoilWat SWT.out; title=SoilWat SWT
        variables
          variables: dd/mm/yyyy as Date, sw, pond
        events Reporting Frequency: event=daily
      manager ClimateControl
        # Climate Control Window
        date1 = 1-jan  # Enter window START date (dd-mmm)
        date2 = 31-dec  # Enter window END date (dd-mmm)
        # Climate Change Parameters
        MaxtChange = 1  # Change in maximum temperature (oC)
        MintChange = 1  # Change in minimum temperature (oC)
        RainChange = -10  # Relative change in daily rainfall (%)
        RadnChange = -100  # Relative change in daily radiation (%)
        CO2 = 350  # Atmospheric CO2 Concentration (ppm)
        on prenewmet:
```
!  Adjust daily temperatures, rainfall and radiation up or down according to user-defined amounts
! To apply different levels of climate control to different times of year add multiple copies of this logic into your simulation and change the window.

if (date_within('[date1], [date2]') = 1) then
   maxt = 5
   mint = 2
   rain = 0
   radn = 0
   co2 = [CO2]
 endif
```
        on Init:
```
co2 = [CO2]
tav = tav + ([MaxtChange] + [MintChange]) / 2
```
      irrigation
        automatic_irrigation = on
        asw_depth = 600  # Depth to which ASW is calculated. (mm)
        crit_fr_asw = 0.5  # Fraction of ASW below which irrigation is applied (0-1.0)
        irrigation_efficiency = 1  # Efficiency of the irrigation. (0-1.0)
        irrigation_allocation = off  # Allocation limits
        allocation = 0  # Allocation in mm
        default_no3_conc = 0.0  # Nitrate concentration (ppm N)
        default_nh4_conc = 0.0  # Ammonium concentration (ppm N)
        default_cl_conc = 0.0  # Chloride concentration (ppm Cl)
      manager Irrigate
        # Sowing criteria
        date = 1-oct  # Enter sowing date (dd-mmm)
        # Sowing parameters
        crop = wheat  # Enter name of crop to sow
        density = 10  # Enter sowing density (plants/m2)
        depth = 50  # Enter sowing depth (mm)
        cultivar =  # Enter cultivar
        class = plant  # Enter crop growth class
        row_spacing = 500  # Enter row spacing (mm)
        on start_of_day:
```
        if (today = date('[date]') then
               irrigation apply amount = 100
         endif
```
    metfile met
      filename=C:\GitHubRepos\2016_SAE_Tillage_ClimateChange\weather\HawkesBay_VCSN_agent_28460_VCSN_5km_Obs.met
    clock
      start_date = 01/09/1982  # Enter the start date of the simulation
      end_date = 30/08/1984  # Enter the end date of the simulation
    manager ClimateControl
      # Climate Control Window
      date1 = 1-jan  # Enter window START date (dd-mmm)
      date2 = 31-dec  # Enter window END date (dd-mmm)
      # Climate Change Parameters
      MaxtChange = 0  # Change in maximum temperature (oC)
      MintChange = 0  # Change in minimum temperature (oC)
      RainChange = 1  # Fractional multiplier of daily rainfall (0-1)
      RadnChange = 0  # Relative change in daily radiation (%)
      CO2 = 350  # Atmospheric CO2 Concentration (ppm)
      on prenewmet:
```
!  Adjust daily temperatures, rainfall and radiation up or down according to user-defined amounts
! To apply different levels of climate control to different times of year add multiple copies of this logic into your simulation and change the window.

if (date_within('[date1], [date2]') = 1) then
   maxt = maxt + [MaxtChange]
   mint = mint + [MintChange]
!   rain = rain + rain * [RainChange] / 100 ! Changed to fit the logic of producing sim files now is "fractional" multiplier of rainfall
    rain = rain * [RainChange]
   radn = radn + radn * [RadnChange] / 100
   co2 = [CO2]
 endif
```
      on Init:
```
co2 = [CO2]
tav = tav + ([MaxtChange] + [MintChange]) / 2
```
  simulation Swim -> /simulations/SoilWat
    area SWM -> /simulations/SoilWat/SWT
      Soil Ruataniwha_13a1: SoilType=Duric Perch-gley Pallic Soils; Latitude=-41; Longitude=174; YearOfSampling=0
        DataSource=Profile descriptions provided by Smap based on the work done by Trevor Webb.
        LayerStructure
          Thickness=[10, 20, 30, 40, 50, 130, 40, 130, 75, 117.08, 117.08, 117.08, 117.08, 117.08, 117.08, 117.08, 117.08, 117.08, 117.08, 117.08, 117.12, 50, 20]
        Water
          Thickness  BD        AirDry    LL15    DUL     SAT       KS
          10         1.31175   0.0835    0.167   0.353   0.46965   1440
          20         1.31175   0.0835    0.167   0.353   0.46965   1440
          30         1.31175   0.0835    0.167   0.353   0.46965   1440
          40         1.31175   0.0835    0.167   0.353   0.46965   1440
          50         1.31175   0.0835    0.167   0.353   0.46965   1440
          130        1.50785   0.0935    0.187   0.352   0.40083   1920
          40         1.490625  0.115875  0.1545  0.309   0.406875  1440
          130        1.4734    0.122     0.122   0.266   0.41292   960
          75         2.385     0.1       0.1     0.1     0.101     0.24
          117.08     2.17936   0.0488    0.0488  0.1064  0.165168  48
          117.08     2.17936   0.0488    0.0488  0.1064  0.165168  48
          117.08     2.17936   0.0488    0.0488  0.1064  0.165168  48
          117.08     2.17936   0.0488    0.0488  0.1064  0.165168  48
          117.08     2.17936   0.0488    0.0488  0.1064  0.165168  48
          117.08     2.17936   0.0488    0.0488  0.1064  0.165168  48
          117.08     2.17936   0.0488    0.0488  0.1064  0.165168  48
          117.08     2.17936   0.0488    0.0488  0.1064  0.165168  48
          117.08     2.17936   0.0488    0.0488  0.1064  0.165168  48
          117.08     2.17936   0.0488    0.0488  0.1064  0.165168  48
          117.08     2.17936   0.0488    0.0488  0.1064  0.165168  48
          117.12     2.17936   0.0488    0.0488  0.1064  0.165168  48
          50         2.17936   0.0488    0.0488  0.1064  0.165168  48
          20         2.17936   0.0488    0.0488  0.1064  0.165168  48
          SoilCrop Ryegrass_Clover
            LL=[0.167, 0.167, 0.167, 0.167, 0.167, 0.187, 0.1545, 0.122, 0.1, 0.0488, 0.0488, 0.0488, 0.0488, 0.0488, 0.0488, 0.0488, 0.0488, 0.0488, 0.0488, 0.0488, 0.0488, 0.0488, 0.0488]
            KL=[0.15, 0.15, 0.15, 0.15, 0.15, 0.175, 0.175, 0.0900743, 0.00162326, 0.0182457, 0.00903811, 0, 0, 0, 0, 0, 0, 0, 0, 0, 0, 0, 0]
            XF=[1, 1, 1, 1, 1, 1, 1, 1, 0.0177388, 0.510686, 0.510686, 0.510686, 0.510686, 0.510686, 0.510686, 0.510686, 0.510686, 0.510686, 0.510686, 0.510686, 0.510686, 0.510686, 0.510686]
        SoilOrganicMatter: RootCN=40; RootWt=1000; SoilCN=11; EnrACoeff=7.4; EnrBCoeff=0.2; OCUnits=Total
          Thickness  OC        FBiom      FInert
          10         2.6       0.0488178  0.162655
          20         2.6       0.0454768  0.1995
          30         2.6       0.0405352  0.257341
          40         2.6       0.0347513  0.331366
          50         2.6       0.0288947  0.415804
          130        1.62685   0.0210108  0.554037
          40         0.922866  0.016612   0.654416
          130        0.566216  0.0139705  0.732201
          75         0.361293  0.0121466  0.803092
          117.08     0.274806  0.0112064  0.852384
          117.08     0.22932   0.0105976  0.896105
          117.08     0.211492  0.010296   0.926877
          117.08     0.204504  0.0101466  0.948535
          117.08     0.201765  0.0100726  0.963778
          117.08     0.200692  0.010036   0.974507
          117.08     0.200271  0.0100178  0.982057
          117.08     0.200106  0.0100088  0.987372
          117.08     0.200042  0.0100044  0.991112
          117.08     0.200016  0.0100022  0.993745
          117.08     0.200006  0.0100011  0.995597
          117.12     0.200003  0.0100005  0.996902
          50         0.200001  0.0100003  0.997589
          20         0.200001  0.0100003  0.997829
        Analysis: PHUnits=Water; BoronUnits=HotWater
          Thickness  Rocks  PH  CEC     ParticleSizeSand  ParticleSizeSilt  ParticleSizeClay
          150        0      7   16.014  8                 72                20
          150        0      7   16.014  8                 72                20
          150        0      7   10.93   60                28                12
          75         0      7   10.93   60                28                12
          1475       60     7   10.93   60                28                12
        Sample Initial nitrogen: NO3Units=kgha; NH4Units=kgha; SWUnits=Volumetric; OCUnits=Total; PHUnits=Water
          Thickness  NO3        NH4
          10         1.33       0.1
          20         2.66       0.1
          30         3.99       0.1
          40         5.32       0.1
          50         6.65       0.1
          130        17.29      0.1
          40         5.32       0.1
          130        17.29      0.1
          75         6.70833    0.1
          117.08     0.273187   0.1
          117.08     0.273187   0.1
          117.08     0.273187   0.1
          117.08     0.273187   0.1
          117.08     0.273187   0.1
          117.08     0.273187   0.1
          117.08     0.273187   0.1
          117.08     0.273187   0.1
          117.08     0.273187   0.1
          117.08     0.273187   0.1
          117.08     0.273187   0.1
          117.12     0.27328    0.1
          50         0.116667   0.1
          20         0.0466667  0.1
        InitialWater Initial water: FractionFull=1; PercentMethod=FilledFromTop
        Swim: Salb=0.13; CN2Bare=75; CNRed=20; CNCov=0.8; KDul=0.1; PSIDul=-100; VC=false; DTmin=0; DTmax=1440; MaxWaterIncrement=10; SpaceWeightingFactor=0; SoluteSpaceWeightingFactor=0; Diagnostics=false
          SwimSoluteParameters: ThicknessUnits=mm
            Thickness  NO3Exco  NO3FIP  NH4Exco  NH4FIP    UreaExco  UreaFIP  ClExco  ClFIP
            150.0      0.0      1.0     35.3153  0.548182  0.0       1.0      0.0     1.0
            150.0      0.0      1.0     35.3153  0.548182  0.0       1.0      0.0     1.0
            150.0      0.0      1.0     31.8564  0.53009   0.0       1.0      0.0     1.0
            75.0       0.0      1.0     31.8564  0.53009   0.0       1.0      0.0     1.0
            1475.0     0.0      1.0     31.8564  0.53009   0.0       1.0      0.0     1.0
            Dis = 15  # Dispersivity - dis ((cm^2/h)/(cm/h)^p)
            Disp = 1  # Dispersivity Power - disp
            A = 1.0  # Tortuosity Constant - a
            DTHC = 0.0  # Tortuoisty Offset - dthc
            DTHP = 1.0  # Tortuoisty Power - dthp
            WaterTableCl = 0  # Water Table Cl Concentration (ppm)
            WaterTableNO3 = 0.0  # Water Table NO3 Concentration (ppm)
            WaterTableNH4 = 0.0  # Water Table NH4 Concentration (ppm)
            WaterTableUrea = 0.0  # Water Table Urea Concentration (ppm)
      outputfile -> /simulations/SoilWat/SWT/outputfile: filename=Swim SWM.out; title=Swim SWM
        variables -> /simulations/SoilWat/SWT/outputfile/Variables
        events Reporting Frequency -> /simulations/SoilWat/SWT/outputfile/Reporting Frequency
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